// COMSOL Multiphysics 5.3.0.260 model "SebastienHervieuEx1.mph"
// Outline of the model tree

Parameters
  steph = 0.2

Variables
  var1 "Variables 1"
    uex = sin(2*pi*x)*cos(pi*y)
    f = 2*(2*pi)^2*cos(2*pi*x)*sin(2*pi*x)+2*pi^2*cos(pi*y)*sin(pi*y)

Probes
  dom1: Domain "ErrorInt" on all domains | type = integral; probename = errorInt; expr = abs(u-uex)^2; table = tbl1
  dom2: Domain "Umax" on all domains | type = maximum; probename = umax; expr = abs(u); unit = 1; table = tbl1

Geometry
  geom1 "Geometry 1" (2D, length unit m)
    sq1: Square
    c1: Circle | pos = {0, 0.5}; r = 0.2
    dif1: Difference | input = sq1; input2 = c1
    fin: Finalize "Form Union"

Physics
  c: CoefficientFormPDE on all domains
    dependent variable u
    ShapeProperty.order = 3
    cfeq1: CoefficientFormPDE (default) | c = {1, 0, 0, 1}; f = f; da = 0
    zflx1: ZeroFluxBoundary "Zero Flux 1" (default)
    init1: init "Initial Values 1" (default)
    dir1: DirichletBoundary "Dirichlet Boundary Condition 1" on boundaries 2, 4 | r = uex

Mesh
  mesh1 "Mesh 1"
    size: MeshSizeDefault | hmax = steph; custom = on
    ftri1: FreeTri "Free Triangular 1" on remaining entities

Studies
  std1 "Study 1"
    param: Parametric "Parametric Sweep" | pname = steph; plistarr = range(0.2,-0.01,0.01)
    stat: Stationary

Solver configurations
  sol1 "Solution 1" (study std1)
    v1: Variables "Dependent Variables 1"
    s1: Stationary "Stationary Solver 1"
      dDef: Direct
      fc1: FullyCoupled | linsolver = dDef
  sol2 "Parametric Solutions 1" (study std1)

Datasets
  dset1: Solution | solution = sol1
  dset2: Solution | solution = sol2
  dset3: Solution "Probe Solution 3" | solution = sol1
  int1: Integral "ErrorInt" on domains 1 | data = dset3
  max1: Maximum "Umax" on domains 1 | data = dset3

Derived values
  pev1: EvalPoint "ErrorInt" | data = int1; table = tbl1; expr = abs(u-uex)^2
  pev2: EvalPoint "Umax" | data = max1; table = tbl1; expr = abs(u)

Tables
  tbl1: Table "Probe Table 1"
    steph | abs(u-uex)^2 (m^2), ErrorInt | abs(u) (1), Umax
    0.2 | 0.268606 | 1.16611
    0.19 | 0.268624 | 1.16612
    0.18 | 0.268623 | 1.16612
    0.17 | 0.268627 | 1.1661
    0.16 | 0.268644 | 1.16611
    0.15 | 0.268646 | 1.16611
    0.14 | 0.268646 | 1.16611
    0.13 | 0.268648 | 1.16611
    0.12 | 0.26865 | 1.1661
    0.11 | 0.268649 | 1.1661
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
Plots
  pg1: PlotGroup2D "2D Plot Group 1" | data = dset1
    surf1: Surface | expr = u
  pg2: PlotGroup2D "2D Plot Group 2" | data = dset2
    surf1: Surface | expr = u
  pg3: PlotGroup1D "Probe Plot Group 3"
    tblp1: Table "Probe Table Graph 1" | table = tbl1; xaxisdata = auto; plotcolumns = {2, 3}
  pg4: PlotGroup1D "1D Plot Group 4" | data = dset1
    glob1: Global
      data = dset2
      expr = {log10(sqrt(errorInt)/umax), log10(steph^4)}
      descr = {Log10ErrorL2, }
      xdata = expr
      xdataexpr = log10(steph)