// COMSOL Multiphysics 5.3.0.260 model "SebastienHervieuEx2.2.mph"
// Outline of the model tree

Parameters
  sigmam = 10
  alpha = 0.2
  beta = 1

Geometry
  geom1 "Geometry 1" (2D, length unit m)
    r1: Rectangle | pos = {-0.5, 0}; size = {0.25, 1}
    r2: Rectangle | pos = {-0.25, 0}; size = {0.5, 1}
    r3: Rectangle | pos = {0.25, 0}; size = {0.25, 1}
    r4: Rectangle | pos = {-.5, 0}; size = {1, .5}
    fin: Finalize "Form Union"

Physics
  c: CoefficientFormPDE on all domains
    dependent variable u
    cfeq1: CoefficientFormPDE (default) | c = {1, 0, 0, 1}; f = 1; da = 1
    zflx1: ZeroFluxBoundary "Zero Flux gamma1 union gamma 3" (default)
    init1: init "Initial Values 1" (default)
    dir1: DirichletBoundary "Dirichlet Boundary Condition gamma4" on boundaries 1, 3 | r = alpha
    dir2: DirichletBoundary "Dirichlet Boundary Condition gamma 2" on boundaries 16, 17 | r = beta

Mesh
  mesh1 "Mesh 1" (physics-controlled)

Studies
  std1 "Study 1"
    time: Transient "Time Dependent" | tlist = range(0,0.1,1); useinitsol = on

Solver configurations
  sol1 "Solution 1" (study std1)
    v1: Variables "Dependent Variables 1"
    t1: Time "Time-Dependent Solver 1" | tlist = range(0,0.1,1)
      dDef: Direct
      fc1: FullyCoupled | linsolver = dDef
  sol2 "Parametric Solutions 1" (study std1)

Datasets
  dset1: Solution | solution = sol1
  dset2: Solution | solution = sol2

Plots
  pg1: PlotGroup2D "2D Plot Group 1" | data = dset1
    surf1: Surface | expr = u