// COMSOL Multiphysics 5.3.0.260 model "openRectWaveGuide.mph"
// Outline of the model tree

Parameters
  a = 1
  b = 2
  na = 1
  ng = 1.5
  k0 = 1
  q = 1
  p = 1
  steph = 0.1
  d = 2

Variables
  var1 "Variables 1"
    upq = sin(p*pi*x/a)*sin(q*pi*y/b)

Probes
  dom1: Domain "L2ucladding" on domains 1 | type = integral; probename = L2ucladding; expr = u^2; unit = m^2; table = tbl1
  dom2: Domain "umax" on domains 2
    type = maximum
    probename = umax
    expr = u
    unit = 1
    descr = Dependent variable u
    table = tbl1
  dom3: Domain "ErrInfuOmg" on domains 2 | type = maximum; probename = ErrInfuOmg; expr = abs((u/umax)-upq); table = tbl1

Geometry
  geom1 "Geometry 1" (2D, length unit m)
    r1: Rectangle "ng" | size = {a, b}
    r2: Rectangle "na" | pos = {-d, -d}; size = {a+d+d, b+d+d}
    fin: Finalize "Form Union" | pairtype = contact

Physics
  c: CoefficientFormPDE on domains 1, 2
    dependent variable u
    cfeq1: CoefficientFormPDE (default) | c = {1, 0, 0, 1}; a = -k0^2 * na^2; f = 0; da = 1
    zflx1: ZeroFluxBoundary "Zero Flux 1" (default)
    init1: init "Initial Values 1" (default)
    cfeq2: CoefficientFormPDE on domains 2 | c = {1, 0, 0, 1}; a = -k0^2*ng^2; f = 0; da = 1
    dir1: DirichletBoundary "Dirichlet Boundary Condition 1" on no boundaries | r = 0

Mesh
  mesh1 "Mesh 1"
    size: MeshSizeDefault | hmax = steph; custom = on
    ftri1: FreeTri "Free Triangular 1" on domains 2
    size1: Size on domains 1
    ftri2: FreeTri "Free Triangular 2" on remaining entities

Studies
  std1 "Study 1"
    param: Parametric "Parametric Sweep" | pname = k0; plistarr = 10^{range(log10(1),1/1,log10(1000))}
    eigv: Eigenvalue | shift = -k0^2*ng^2

Solver configurations
  sol1 "Solution 1" (study std1)
    v1: Variables "Dependent Variables 1"
    e1: Eigenvalue "Eigenvalue Solver 1"
      dDef: Direct
  sol2 "Parametric Solutions 1" (study std1)

Datasets
  dset1: Solution | solution = sol1
  dset2: Solution "Probe Solution 2" | solution = sol1
  max1: Maximum "umax" on domains 2 | data = dset2
  int1: Integral "L2ucladding" on domains 1 | data = dset2
  dset3: Solution | solution = sol2
  max2: Maximum "ErrInfuOmg" on domains 2 | data = dset2

Derived values
  pev1: EvalPoint "umax" | data = max1; table = tbl1; expr = u
  pev2: EvalPoint "L2ucladding" | data = int1; table = tbl1; expr = u^2
  pev3: EvalPoint "ErrInfuOmg" | data = max2; table = tbl1; expr = abs((u/umax)-upq)

Tables
  tbl1: Table "Probe Table 1"
    k0 | Dependent variable u (1), umax | u^2 (m^2), L2ucladding | abs((u/umax)-upq) (1), ErrInfuOmg
    1 | 1.29203 | 17.3569 | 0.901806
    10 | 3.02614 | 0.060514 | 0.2378
    100 | 3.3941 | 9.59112e-05 | 0.0190425
    1000 | 3.42251 | 1.55012e-08 | 0.000380281

Plots
  pg1: PlotGroup2D "2D Plot Group 1" | data = dset1
    surf1: Surface | expr = u
  pg2: PlotGroup1D "Probe Plot Group 2"
    tblp1: Table "Probe Table Graph 1" | table = tbl1; xaxisdata = auto; plotcolumns = {2, 3, 4}
  pg3: PlotGroup1D "1D Plot Group 3" | data = dset3
    glob1: Global
      expr = {log10(L2ucladding), log10(ErrInfuOmg/umax)}
      descr = {log10(L2ucladding), log10(normLinfucore)}
      xdataexpr = log10(k0)
  pg4: PlotGroup2D "2D Plot Group 4" | data = dset3
    surf1: Surface | expr = u