// COMSOL Multiphysics 5.3.0.260 model "slabWaveGuide.mph"
// Outline of the model tree

Parameters
  na = 1
  ng = 1.5
  hg = 0.4[um]
  lamba = 1.0414[um]
  k = 2*pi/lamba
  beta = 7.936192[um^-1]
  p = sqrt(k^2*ng^2-beta^2)
  q = sqrt(-k^2*ng^2+beta^2)
  c = 299792458[m/s]
  nu = c/lamba
  steph = lamba/10

Variables
  var1 "Variables 1"
    uin = (cos(p*hg)+q*sin(p+hg)/p)*exp(-q*(y-hg))*(y>hg) + cos(p*y)+q*sin(p*y)/p*(y>=hg && y>=0)+exp(q*y)*(y<0)

Geometry
  geom1 "Geometry 1" (2D, length unit µm)
    r1: Rectangle | size = {10, 0.4}
    r2: Rectangle | pos = {0, -2.5}; size = {10, 5.4}
    fin: Finalize "Form Union"

Materials
  mat1: Common "Core" on all domains
    RefractiveIndex
      n = ng
      ki = 0
  mat2: Common "Gaine" on domains 1, 3
    RefractiveIndex
      n = na
      ki = 0

Physics
  emw: ElectromagneticWaves "Electromagnetic Waves, Frequency Domain" on all domains
    dependent variable E = {Ex, Ey, Ez}
    ShapeProperty.order_electricfield = 1
    wee1: WaveEquationElectric (default) | DisplacementFieldModel = RefractiveIndex; n_mat = from_mat
    pec1: PerfectElectricConductor (default)
    init1: init "Initial Values 1" (default)
    efb1: ElectricField on boundaries 1, 3, 5 | E0 = {0, 0, uin}

Mesh
  mesh1 "Mesh 1"
    ftri1: FreeTri "Free Triangular 1" on remaining entities
    size1: Size on domains 2 | hmax = steph; custom = on

Studies
  std1 "Study 1"
    freq: Frequency "Frequency Domain" | punit = GHz; plist = nu

Solver configurations
  sol1 "Solution 1" (study std1)
    v1: Variables "Dependent Variables 1"
    s1: Stationary "Stationary Solver 1" | stol = 0.01
      p1: Parametric | pname = freq; plistarr = nu; punit = GHz; pcontinuationmode = no
      fc1: FullyCoupled | linsolver = d1
      d1: Direct "Suggested Direct Solver (emw)" | linsolver = pardiso

Datasets
  dset1: Solution | solution = sol1

Plots
  pg1: PlotGroup2D "Electric Field (emw)" | data = dset1
    surf1: Surface | expr = emw.normE