// COMSOL Multiphysics 5.3.0.260 model "slabWaveGuide.mph"
// Outline of the model tree

Parameters
  hg = 0.4[um]
  L = 10[um]
  ng = 1.5
  d = 2.5[um]
  na = 1
  beta = 7.936192[um^-1]
  lambda = 1.0414[um]
  k = 2*pi/lambda
  c = 299792458[m/s]
  nu = c/lambda
  p = sqrt(k^2*ng^2-beta^2)
  q = sqrt(k^2*na^2+beta^2)

Variables
  var1 "Variables 1"
    uin = (cos(p*hg)+q*sin(p*hg)/p)*exp(-q*(y-hg))*(y>hg)+(cos(p*y)+q*sin(p*y)/p)*(y<=hg && y>=0)+exp(q*y)(y<0)

Geometry
  geom1 "Geometry 1" (2D, length unit µm)
    r1: Rectangle "ng waveguide" | size = {L, hg}
    r2: Rectangle "na gaine" | pos = {0, -d}; size = {L, 2*d+hg}
    fin: Finalize "Form Union"

Materials
  mat1: Common "Material ng" on domains 2
    RefractiveIndex
      n = ng
      ki = 0
  mat2: Common "Material na" on domains 1, 3
    RefractiveIndex
      n = na
      ki = 0

Physics
  emw: ElectromagneticWaves "Electromagnetic Waves, Frequency Domain" on all domains
    dependent variable E = {Ex, Ey, Ez}
    ShapeProperty.order_electricfield = 1
    wee1: WaveEquationElectric (default) | DisplacementFieldModel = RefractiveIndex
    pec1: PerfectElectricConductor (default)
    init1: init "Initial Values 1" (default)

Mesh
  mesh1 "Mesh 1" (physics-controlled)

Studies
  std1 "Study 1"
    freq: Frequency "Frequency Domain" | punit = GHz; plist = 1[GHz]